// COMSOL Multiphysics 4.1 (Build: 88) model "5_random_sources.mph"
// Outline of the model tree

Parameters
  L = 240
  alpha = 80
  K0 = 1
  A = K0/(2*pi*R)
  R = L/alpha

Geometry
  geom1 "Geometry 1" (2D, length unit m)
    sq1: Square | pos = {L/2, L/2}; base = center; size = L
    c1: Circle | pos = {(2.47*0.6/7+0.2)*L, (3.84*0.6/7+0.2)*L}; base = center; r = R
    c2: Circle | pos = {(1.56*0.6/7+0.2)*L, (1.85*0.6/7+0.2)*L}; base = center; r = R
    c3: Circle | pos = {(4.29*0.6/7+0.2)*L, (5.39*0.6/7+0.2)*L}; base = center; r = R
    c4: Circle | pos = {(5.2*0.6/7+0.2)*L, (1.68*0.6/7+0.2)*L}; base = center; r = R
    c5: Circle | pos = {(4.39*0.6/7+0.2)*L, (4.38*0.6/7+0.2)*L}; base = center; r = R
    c6: Circle | pos = {(4.59*0.6/7+0.2)*L, (3.44*0.6/7+0.2)*L}; base = center; r = R
    dif1: Difference | input = sq1; input2 = c1, c2, c3, c4, c5, c6
    fin: Finalize "Form Union"

Physics
  lpeq: LaplaceEquation "PDE"
    dependent variable u
    leq1: LaplaceEquation
    zflx1: ZeroFluxBoundary "Zero Flux 1"
    init1: init "Initial Values 1"
    dir1: DirichletBoundary "Dirichlet Boundary Condition 1" | r = 0
    flux1: FluxBoundary "Flux/Source 1" | g = A; q = A
    flux2: FluxBoundary "Flux/Source 2" | q = A

Mesh
  mesh1 "Mesh 1" (physics-controlled)
    size: MeshSizeDefault | hauto = 2

Studies
  std1 "Study 1"
    stat: Stationary

Solver configurations
  sol1 "Solver 1" (study std1)
    v1: Variables "Dependent Variables 1"
    s1: Stationary "Stationary Solver 1"
      dDef: Direct
      fc1: FullyCoupled

Datasets
  dset1: Solution | solution = sol1
  cln1: CutLine2D | data = dset1; genpoints = {{L/2+1.5, -L}, {L/2+1.5, 2*L}}

Derived values
  int1: IntLine "Line Integration 1" | data = dset1; table = tbl4; expr = lpeq.g_u
  int2: IntLine "Line Integration 2" | data = dset1; table = tbl4; expr = lpeq.g_u
  int3: IntLine "Line Integration 3" | data = dset1; table = tbl4; expr = lpeq.g_u
  int4: IntLine "Line Integration 4" | data = dset1; table = tbl4; expr = lpeq.g_u
  int5: IntLine "Line Integration 5" | data = dset1; table = tbl4; expr = lpeq.g_u
  int6: IntLine "Line Integration 6" | data = dset1; table = tbl4; expr = lpeq.g_u

Tables
  tbl1: Table
    // Line Integration 1 (lpeq.g_u)
    Boundary flux/source
    0.418251
  tbl2: Table
    // Line Integration 1 (lpeq.g_u)
    Boundary flux/source | Boundary flux/source | Boundary flux/source | Boundary flux/source | Boundary flux/source | Boundary flux/source
    0.418251 | 0.497819 | 0.433652 | 0.480186 | 0.362627 | 0.373607
  tbl3: Table
    // Line Integration 1 (lpeq.g_u)
    Boundary flux/source | Boundary flux/source | Boundary flux/source | Boundary flux/source | Boundary flux/source | Boundary flux/source
    0.467876 | 0.525465 | 0.48131 | 0.543501 | 0.465488 | -0.291105
  tbl4: Table
    // Line Integration 1 (lpeq.g_u)
    Boundary flux/source | Boundary flux/source | Boundary flux/source | Boundary flux/source | Boundary flux/source | Boundary flux/source
    -0.182191 | 0.583009 | 0.525734 | 0.570309 | 0.518904 | -0.24148

Plots
  pg1: PlotGroup2D "2D Plot Group 1" | data = dset1
    surf1: Surface | expr = u
    line1: Line | data = none; expr = u
  pg2: PlotGroup1D "1D Plot Group 2" | data = cln1; xlabel = y; ylabel = \phi
    lngr1: LineGraph | data = cln1; expr = u

Exports
  plot2: Plot | filename = /home/pdavid/Bureau/COMSOL_tests/random_output.txt
  plot3: Plot | filename = /home/pdavid/Bureau/COMSOL_tests/FV_metab_dimensional-25avril/random_output.txt
  data1: Data | data = cln1
  plot4: Plot | filename = /home/pdavid/Bureau/COMSOL_tests/FV_metab_dimensional-25avril/random_output.txt
  plot5: Plot | filename = /home/pdavid/Bureau/COMSOL_tests/2D_output_test.txt