// COMSOL Multiphysics 4.1 (Build: 88) model "Double_source_diff.mph"
// Outline of the model tree

Parameters
  L = 10
  alpha = 100
  K0 = 1
  d = 22
  C_comsol = K0*alpha/(2*pi*L)
  dist = d*L/alpha
  R = L/alpha

Variables
  var1 "Variables 1"

Geometry
  geom1 "Geometry 1" (2D, length unit m)
    sq1: Square | pos = {L/2, L/2}; base = center; size = L
    c1: Circle | pos = {L/2-dist/2, L/2}; base = center; r = R
    c2: Circle | pos = {L/2+dist/2, L/2}; base = center; r = R/2
    dif1: Difference | input = sq1; input2 = c1, c2
    fin: Finalize "Form Union"

Physics
  lpeq: LaplaceEquation "PDE"
    dependent variable u
    leq1: LaplaceEquation
    zflx1: ZeroFluxBoundary "Zero Flux 1"
    init1: init "Initial Values 1"
    flux1: FluxBoundary "Flux/Source 1" | g = C_comsol; q = C_comsol
    flux2: FluxBoundary "Flux/Source 2" | g = 0; q = C_comsol
    dir1: DirichletBoundary "Dirichlet Boundary Condition 1" | r = 0

Mesh
  mesh1 "Mesh 1" (physics-controlled)
    size: MeshSizeDefault | hauto = 2

Studies
  std1 "Study 1"
    stat: Stationary

Solver configurations
  sol1 "Solver 1" (study std1)
    v1: Variables "Dependent Variables 1"
    s1: Stationary "Stationary Solver 1"
      dDef: Direct
      fc1: FullyCoupled

Datasets
  dset1: Solution | solution = sol1
  cln1: CutLine2D | data = dset1; genpoints = {{0, L/2}, {L, L/2}}

Derived values
  int1: IntLine "Line Integration 1" | data = dset1; table = tbl1; expr = lpeq.g_u
  int2: IntLine "Line Integration 2" | data = dset1; table = tbl2; expr = lpeq.g_u

Tables
  tbl1: Table
    // Line Integration 1 (lpeq.g_u)
    Boundary flux/source | Boundary flux/source | Boundary flux/source | Boundary flux/source | Boundary flux/source | Boundary flux/source | Boundary flux/source
    0.647779 | 0.635246 | 0.628724 | 0.622222 | 0.619237 | 0.61785 | 0.617397
  tbl2: Table
    // Line Integration 2 (lpeq.g_u)
    Boundary flux/source | Boundary flux/source | Boundary flux/source | Boundary flux/source | Boundary flux/source | Boundary flux/source | Boundary flux/source
    -0.122777 | -0.0956459 | -0.0800962 | -0.0611166 | -0.0490674 | -0.0403619 | -0.0336414

Plots
  pg1: PlotGroup2D "2D Plot Group 1" | data = dset1
    surf1: Surface | expr = u
  pg2: PlotGroup1D "1D Plot Group 2" | data = cln1
    lngr1: LineGraph | expr = u

Exports
  plot1: Plot "2D"
    filename = /home/pdavid/Bureau/COMSOL_tests/Double_source_COMSOL/Double_source_diff/alpha100/SourceSink/d6_2D.txt
  plot2: Plot "1D"
    filename = /home/pdavid/Bureau/COMSOL_tests/Double_source_COMSOL/Double_source_diff/alpha100/SourceSink/d6_1D.txt