// COMSOL Multiphysics 4.1 (Build: 88) model "Double_source.mph"
// Outline of the model tree

Parameters
  L = 10
  R = L/alpha
  C_0 = 1
  C_comsol = C_0/(2*pi*R)
  alpha = 50
  d = 30
  l = d*R/2^0.5
  h_ss = L/cells
  cells = 10
  p1 = L/2+h_ss

Variables
  iexpr4 "Variables 4"

Geometry
  geom1 "Geometry 1" (2D, length unit m)
    sq1: Square | pos = {L/2, L/2}; base = center; size = L
    c1: Circle | pos = {p1, p1}; base = center; r = R
    c2: Circle | pos = {p1-l, p1-l}; base = center; r = R
    dif1: Difference | input = sq1; input2 = c1, c2
    fin: Finalize "Form Union"

Physics
  lpeq: LaplaceEquation "PDE"
    dependent variable u
    leq1: LaplaceEquation
    zflx1: ZeroFluxBoundary "Zero Flux 1"
    init1: init "Initial Values 1"
    flux1: FluxBoundary "Flux/Source 1" | g = 0; q = C_comsol
    dir1: DirichletBoundary "Dirichlet Boundary Condition 1" | r = 0
    flux2: FluxBoundary "Flux/Source 2" | g = C_comsol; q = C_comsol

Mesh
  mesh1 "Mesh 1" (physics-controlled)
    size: MeshSizeDefault | hauto = 2

Studies
  std1 "Study 1"
    stat: Stationary

Solver configurations
  sol1 "Solver 1" (study std1)
    v1: Variables "Dependent Variables 1"
    s1: Stationary "Stationary Solver 1"
      dDef: Direct
      fc1: FullyCoupled

Datasets
  dset1: Solution | solution = sol1

Derived values
  int1: IntLine "Line Integration 1" | data = dset1; table = tbl7; expr = lpeq.g_u
  int2: IntLine "Line Integration 2" | data = dset1; table = tbl8; expr = lpeq.g_u

Tables
  tbl1: Table "alpha100_Sources_1"
    // Line Integration 1 (lpeq.g_u)
    Boundary flux/source | Boundary flux/source | Boundary flux/source | Boundary flux/source | Boundary flux/source
    0.460238 | 0.491231 | 0.529677 | 0.560096 | 0.578263
  tbl2: Table "alpha100_Sources_2"
    // Line Integration 2 (lpeq.g_u)
    Boundary flux/source | Boundary flux/source | Boundary flux/source | Boundary flux/source | Boundary flux/source
    0.458696 | 0.488925 | 0.525753 | 0.556631 | 0.579341
  tbl3: Table "alpha100_SourceSink_1"
    // Line Integration 1 (lpeq.g_u)
    Boundary flux/source | Boundary flux/source | Boundary flux/source | Boundary flux/source | Boundary flux/source
    -0.208075 | -0.162387 | -0.10252 | -0.0618699 | -0.0401722
  tbl4: Table "alpha100_SourceSink_2"
    // Line Integration 2 (lpeq.g_u)
    Boundary flux/source | Boundary flux/source | Boundary flux/source | Boundary flux/source | Boundary flux/source
    0.666771 | 0.651312 | 0.628273 | 0.6185 | 0.619513
  tbl5: Table "alpha50_Sources_1"
    // Line Integration 1 (lpeq.g_u)
    Boundary flux/source | Boundary flux/source | Boundary flux/source | Boundary flux/source | Boundary flux/source
    0.512114 | 0.550166 | 0.596713 | 0.632175 | 0.651453
  tbl6: Table "alpha50_Sources_2"
    // Line Integration 2 (lpeq.g_u)
    Boundary flux/source | Boundary flux/source | Boundary flux/source | Boundary flux/source | Boundary flux/source
    0.508966 | 0.545862 | 0.59269 | 0.643708 | 0.704751
  tbl7: Table "alpha50_SourceSink_1"
    // Line Integration 1 (lpeq.g_u)
    Boundary flux/source | Boundary flux/source | Boundary flux/source | Boundary flux/source | Boundary flux/source
    -0.182776 | -0.133951 | -0.0712773 | -0.0298176 | -0.00940506
  tbl8: Table "alpha50_SourceSink_2"
    // Line Integration 2 (lpeq.g_u)
    Boundary flux/source | Boundary flux/source | Boundary flux/source | Boundary flux/source | Boundary flux/source
    0.691742 | 0.679814 | 0.663967 | 0.673526 | 0.714156

Plots
  pg1: PlotGroup2D "2D Plot Group 1" | data = dset1
    surf1: Surface | expr = u

Exports
  plot1: Plot "alpha100_2D_d2_sources_same"
    filename = /home/pdavid/Bureau/COMSOL_tests/Double_source_COMSOL/Double_source_alpha100_2D_d2_sources_same.txt
  plot2: Plot "alpha100_2D_d30_sources_same"
    filename = /home/pdavid/Bureau/COMSOL_tests/Double_source_COMSOL/Double_source_alpha100_2D_d30_sources_same.txt
  plot3: Plot "alpha100_2D_d2_SourceSink_same"
    filename = /home/pdavid/Bureau/COMSOL_tests/Double_source_COMSOL/Double_source_alpha100_2D_d2_SourceSink_same.txt
  plot4: Plot "alpha100_2D_d30_SourceSink_same"
    filename = /home/pdavid/Bureau/COMSOL_tests/Double_source_COMSOL/Double_source_alpha100_2D_d30_SourceSink_same.txt
  plot5: Plot "alpha50_2D_d2_SourceSink_same"
    filename = /home/pdavid/Bureau/COMSOL_tests/Double_source_COMSOL/Double_source_alpha50_2D_d2_SourceSink_same.txt
  plot6: Plot "alpha50_2D_d30_SourceSink_same"
    filename = /home/pdavid/Bureau/COMSOL_tests/Double_source_COMSOL/Double_source_alpha50_2D_d2_SourceSink_same.txt
  plot7: Plot "alpha50_2D_d2_sources_same"
    filename = /home/pdavid/Bureau/COMSOL_tests/Double_source_COMSOL/Double_source_alpha50_2D_d2_sources_same.txt
  plot8: Plot "alpha50_2D_d30_sources_same"
    filename = /home/pdavid/Bureau/COMSOL_tests/Double_source_COMSOL/Double_source_alpha50_2D_d30_sources_same.txt