// COMSOL Multiphysics 4.1 (Build: 88) model "Multiple_sources_network_tests.mph"
// Outline of the model tree

Parameters
  L = 240
  R = L/80

Geometry
  geom1 "Geometry 1" (2D, length unit m)
    sq1: Square | pos = {0, 0}; base = corner; size = L
    c1: Circle | pos = {110.4*L/240, 27.84*L/240}; base = center; r = R
    c2: Circle | pos = {70.08*L/240, 56.64*L/240}; base = center; r = R
    c3: Circle | pos = {139.2*L/240, 68.16*L/240}; base = center; r = R
    c4: Circle | pos = {68.16*L/240, 75.84*L/240}; base = center; r = R
    c5: Circle | pos = {129.6*L/240, 87.36*L/240}; base = center; r = R
    c6: Circle | pos = {219.84*L/240, 102.72*L/240}; base = center; r = R
    c7: Circle | pos = {208.32*L/240, 106.56*L/240}; base = center; r = R
    c8: Circle | pos = {75.86*L/240, 139.2*L/240}; base = center; r = R
    c9: Circle | pos = {129.6*L/240, 148.8*L/240}; base = center; r = R
    c10: Circle | pos = {137.28*L/240, 150.72*L/240}; base = center; r = R
    c11: Circle | pos = {152.64*L/240, 152.64*L/240}; base = center; r = R
    c12: Circle | pos = {48.96*L/240, 168*L/240}; base = center; r = R
    c13: Circle | pos = {52.8*L/240, 202.56*L/240}; base = center; r = R
    c14: Circle | pos = {62.4*L/240, 191.04*L/240}; base = center; r = R
    c15: Circle | pos = {77.76*L/240, 212.16*L/240}; base = center; r = R
    c16: Circle | pos = {177.6*L/240, 187.2*L/240}; base = center; r = R
    c17: Circle | pos = {183.36*L/240, 200.64*L/240}; base = center; r = R
    mov1: Move | input = sq1; displx = 0; disply = 0
    dif1: Difference | input = mov1; input2 = c1, c10, c11, c12, c13, c14, c15, c16, c17, c2, c3, c4, c5, c6, c7, c8, c9
    fin: Finalize "Form Union"

Physics
  lpeq: LaplaceEquation "PDE"
    dependent variable u
    leq1: LaplaceEquation
    zflx1: ZeroFluxBoundary "Zero Flux 1"
    init1: init "Initial Values 1"
    dir1: DirichletBoundary "Dirichlet Boundary Condition 1" | r = 0
    flux1: FluxBoundary "Flux/Source 1" | g = 1; q = 1

Mesh
  mesh1 "Mesh 1" (physics-controlled)
    size: MeshSizeDefault | hauto = 3

Studies
  std1 "Study 1"
    stat: Stationary

Solver configurations
  sol1 "Solver 1" (study std1)
    v1: Variables "Dependent Variables 1"
    s1: Stationary "Stationary Solver 1"
      dDef: Direct
      fc1: FullyCoupled

Datasets
  dset1: Solution | solution = sol1
  cln1: CutLine2D | data = dset1; genpoints = {{0, 120}, {240, 120}}

Derived values
  int1: IntLine "Line Integration 1" | data = dset1; table = tbl5; expr = lpeq.g_u
  int2: IntLine "Line Integration 2" | data = dset1; table = tbl4; expr = lpeq.g_u
  int3: IntLine "Line Integration 3" | data = dset1; table = new; expr = lpeq.g_u
  int4: IntLine "Line Integration 4" | data = dset1; table = new; expr = lpeq.g_u
  int5: IntLine "Line Integration 5" | data = dset1; table = new; expr = lpeq.g_u
  int6: IntLine "Line Integration 6" | data = dset1; table = new; expr = lpeq.g_u
  int7: IntLine "Line Integration 7" | data = dset1; table = new; expr = lpeq.g_u
  int8: IntLine "Line Integration 8" | data = dset1; table = new; expr = lpeq.g_u
  int9: IntLine "Line Integration 9" | data = dset1; table = new; expr = lpeq.g_u
  int10: IntLine "Line Integration 10" | data = dset1; table = new; expr = lpeq.g_u
  int11: IntLine "Line Integration 11" | data = dset1; table = new; expr = lpeq.g_u
  int12: IntLine "Line Integration 12" | data = dset1; table = new; expr = lpeq.g_u
  int13: IntLine "Line Integration 13" | data = dset1; table = new; expr = lpeq.g_u
  int14: IntLine "Line Integration 14" | data = dset1; table = new; expr = lpeq.g_u
  int15: IntLine "Line Integration 15" | data = dset1; table = new; expr = lpeq.g_u
  int16: IntLine "Line Integration 16" | data = dset1; table = new; expr = lpeq.g_u
  int17: IntLine "Line Integration 17" | data = dset1; table = new; expr = lpeq.g_u

Tables
  tbl1: Table
    // Line Integration 1 (lpeq.g_u)
    Boundary flux/source
    1.36437
  tbl2: Table
    // Line Integration 2 (lpeq.g_u)
    Boundary flux/source
    0.813486
  tbl3: Table
    // Line Integration 1 (lpeq.g_u)
    Boundary flux/source
    0
  tbl4: Table
    // Line Integration 2 (lpeq.g_u)
    Boundary flux/source
    0
  tbl5: Table
    // Line Integration 1 (lpeq.g_u)
    Boundary flux/source
    0.0741598

Plots
  pg1: PlotGroup2D "2D Plot Group 1" | data = dset1
    surf1: Surface | expr = u
  pg2: PlotGroup1D "1D Plot Group 2" | data = dset1
    lngr1: LineGraph | data = cln1; expr = u

Exports
  data1: Data | data = cln1