// COMSOL Multiphysics 4.1 (Build: 88) model "Single_source.mph"
// Outline of the model tree

Parameters
  L = 240
  R = L/alpha
  C_0 = 1
  C_comsol = C_0/(2*pi*R)
  alpha = 800

Geometry
  geom1 "Geometry 1" (2D, length unit m)
    sq1: Square | pos = {120, 120}; base = center; size = L
    c1: Circle | pos = {L/2, L/2}; base = center; r = R
    dif1: Difference | input = sq1; input2 = c1
    fin: Finalize "Form Union"

Physics
  lpeq: LaplaceEquation "PDE"
    dependent variable u
    leq1: LaplaceEquation
    zflx1: ZeroFluxBoundary "Zero Flux 1"
    init1: init "Initial Values 1"
    flux1: FluxBoundary "Flux/Source 1" | g = C_comsol; q = C_comsol
    dir1: DirichletBoundary "Dirichlet Boundary Condition 1" | r = 0

Mesh
  mesh1 "Mesh 1" (physics-controlled)
    size: MeshSizeDefault | hauto = 4

Studies
  std1 "Study 1"
    stat: Stationary

Solver configurations
  sol1 "Solver 1" (study std1)
    v1: Variables "Dependent Variables 1"
    s1: Stationary "Stationary Solver 1"
      dDef: Direct
      fc1: FullyCoupled

Datasets
  dset1: Solution | solution = sol1
  cln1: CutLine2D | data = dset1; genpoints = {{0, 120}, {240, 120}}

Derived values
  int1: IntLine "Line Integration 1" | data = dset1; table = tbl4; expr = u

Tables
  tbl1: Table
    // Line Integration 1 (lpeq.g_u)
    Boundary flux/source
    1.53329
  tbl2: Table
    // Line Integration 1 (lpeq.g_u)
    Boundary flux/source
    0.573078
  tbl3: Table
    // Line Integration 1 (lpeq.g_u)
    Boundary flux/source
    1.10606
  tbl4: Table
    // Line Integration 1 (lpeq.g_u)
    Boundary flux/source | Dependent variable u
    0.508758 | 0.92596

Plots
  pg1: PlotGroup2D "2D Plot Group 1" | data = dset1
    surf1: Surface | expr = u
  pg2: PlotGroup1D "1D Plot Group 2" | data = cln1
    lngr1: LineGraph | expr = u

Exports
  data1: Data | data = cln1
  img1: Image2D "2D Image 1"
  plot1: Plot | filename = /home/pdavid/Bureau/COMSOL_tests/SingleSource_alpha800_2D_center.txt
  plot2: Plot | filename = /home/pdavid/Bureau/COMSOL_tests/SingleSource_alpha800_1D_center.txt