// COMSOL Multiphysics 4.1 (Build: 88) model "Smith_source_fixed_flux.mph"
// Outline of the model tree

Parameters
  L = 240
  alpha = 50
  K0 = 1
  A = K0/(2*pi*R)
  R = L/alpha
  B = A/3

Geometry
  geom1 "Geometry 1" (2D, length unit m)
    sq1: Square | pos = {L/2, L/2}; base = center; size = L
    c1: Circle | pos = {(0.45*0.6+0.2)*L, (0.02*0.6+0.2)*L}; base = center; r = R
    c2: Circle | pos = {(0.24*0.6+0.2)*L, (0.17*0.6+0.2)*L}; base = center; r = R
    c3: Circle | pos = {(0.6*0.6+0.2)*L, (0.23*0.6+0.2)*L}; base = center; r = R
    c4: Circle | pos = {(0.23*0.6+0.2)*L, (0.27*0.6+0.2)*L}; base = center; r = R
    c5: Circle | pos = {(0.55*0.6+0.2)*L, (0.33*0.6+0.2)*L}; base = center; r = R
    c6: Circle | pos = {(1.02*0.6+0.2)*L, (0.41*0.6+0.2)*L}; base = center; r = R
    c7: Circle | pos = {(0.91*0.6+0.2)*L, (0.43*0.6+0.2)*L}; base = center; r = R
    c8: Circle | pos = {(0.27*0.6+0.2)*L, (0.6*0.6+0.2)*L}; base = center; r = R
    c9: Circle | pos = {(0.52*0.6+0.2)*L, (0.65*0.6+0.2)*L}; base = center; r = R
    c10: Circle | pos = {(0.59*0.6+0.2)*L, (0.66*0.6+0.2)*L}; base = center; r = R
    c11: Circle | pos = {(0.67*0.6+0.2)*L, (0.67*0.6+0.2)*L}; base = center; r = R
    c12: Circle | pos = {(0.13*0.6+0.2)*L, (0.75*0.6+0.2)*L}; base = center; r = R
    c13: Circle | pos = {(0.15*0.6+0.2)*L, (0.93*0.6+0.2)*L}; base = center; r = R
    c14: Circle | pos = {(0.2*0.6+0.2)*L, (0.87*0.6+0.2)*L}; base = center; r = R
    c15: Circle | pos = {(0.28*0.6+0.2)*L, (0.98*0.6+0.2)*L}; base = center; r = R
    c16: Circle | pos = {(0.8*0.6+0.2)*L, (0.85*0.6+0.2)*L}; base = center; r = R
    c17: Circle | pos = {(0.83*0.6+0.2)*L, (0.92*0.6+0.2)*L}; base = center; r = R
    dif1: Difference | input = sq1; input2 = c1, c10, c11, c12, c13, c14, c15, c16, c17, c2, c3, c4, c5, c6, c7, c8, c9
    fin: Finalize "Form Union"

Physics
  lpeq: LaplaceEquation "PDE"
    dependent variable u
    leq1: LaplaceEquation
    zflx1: ZeroFluxBoundary "Zero Flux 1"
    init1: init "Initial Values 1"
    dir1: DirichletBoundary "Dirichlet Boundary Condition 1" | r = 0
    flux1: FluxBoundary "Flux/Source 1" | g = B; q = 0
    flux2: FluxBoundary "Flux/Source 2" | g = B; q = 0
    flux3: FluxBoundary "Flux/Source 3" | g = B; q = 0
    flux4: FluxBoundary "Flux/Source 4" | g = B; q = 0
    flux5: FluxBoundary "Flux/Source 5" | g = B; q = 0
    flux6: FluxBoundary "Flux/Source 6" | g = B; q = 0
    flux7: FluxBoundary "Flux/Source 7" | g = B; q = 0
    flux8: FluxBoundary "Flux/Source 8" | g = B; q = 0
    flux9: FluxBoundary "Flux/Source 9" | g = B; q = 0
    flux10: FluxBoundary "Flux/Source 10" | g = B; q = 0
    flux11: FluxBoundary "Flux/Source 11" | g = B; q = 0
    flux12: FluxBoundary "Flux/Source 12" | g = B; q = 0
    flux13: FluxBoundary "Flux/Source 13" | g = B; q = 0
    flux14: FluxBoundary "Flux/Source 14" | g = B; q = 0
    flux15: FluxBoundary "Flux/Source 15" | g = B; q = 0
    flux16: FluxBoundary "Flux/Source 16" | g = B; q = 0
    flux17: FluxBoundary "Flux/Source 17" | g = B; q = 0
    cfeq1: CoefficientFormPDE | c = {1, 0, 0, 1}; f = -10000000000000*u; da = 1

Mesh
  mesh1 "Mesh 1" (physics-controlled)
    size: MeshSizeDefault | hauto = 3

Studies
  std1 "Study 1"
    stat: Stationary

Solver configurations
  sol1 "Solver 1" (study std1)
    v1: Variables "Dependent Variables 1"
    s1: Stationary "Stationary Solver 1"
      dDef: Direct
      fc1: FullyCoupled

Datasets
  dset1: Solution | solution = sol1
  cln1: CutLine2D | data = dset1; genpoints = {{L/2+1.5, -L}, {L/2+1.5, 2*L}}

Derived values
  int1: IntLine "Line Integration 1" | data = dset1; table = tbl2; expr = u/(2*pi*R)
  int2: IntLine "Line Integration 2" | data = dset1; table = tbl1; expr = u/(2*pi*R)
  int3: IntLine "Line Integration 3" | data = dset1; table = tbl1; expr = u/(2*pi*R)
  int4: IntLine "Line Integration 4" | data = dset1; table = tbl1; expr = u/(2*pi*R)
  int5: IntLine "Line Integration 5" | data = dset1; table = tbl1; expr = u/(2*pi*R)
  int6: IntLine "Line Integration 6" | data = dset1; table = tbl1; expr = u/(2*pi*R)
  int7: IntLine "Line Integration 7" | data = dset1; table = tbl1; expr = u/(2*pi*R)
  int8: IntLine "Line Integration 8" | data = dset1; table = tbl1; expr = u/(2*pi*R)
  int9: IntLine "Line Integration 9" | data = dset1; table = tbl1; expr = u/(2*pi*R)
  int10: IntLine "Line Integration 10" | data = dset1; table = tbl1; expr = u/(2*pi*R)
  int11: IntLine "Line Integration 11" | data = dset1; table = tbl1; expr = u/(2*pi*R)
  int12: IntLine "Line Integration 12" | data = dset1; table = tbl1; expr = u/(2*pi*R)
  int13: IntLine "Line Integration 13" | data = dset1; table = tbl1; expr = u/(2*pi*R)
  int14: IntLine "Line Integration 14" | data = dset1; table = tbl1; expr = u/(2*pi*R)
  int15: IntLine "Line Integration 15" | data = dset1; table = tbl1; expr = u/(2*pi*R)
  int16: IntLine "Line Integration 16" | data = dset1; table = tbl1; expr = u/(2*pi*R)
  int17: IntLine "Line Integration 17" | data = dset1; table = tbl1; expr = u/(2*pi*R)

Tables
  tbl1: Table
    // Line Integration 1 (u/(2*pi*R))
    u/(2*pi*R) | u/(2*pi*R) | u/(2*pi*R) | u/(2*pi*R) | u/(2*pi*R) | u/(2*pi*R) | u/(2*pi*R) | u/(2*pi*R) | u/(2*pi*R) | u/(2*pi*R) | u/(2*pi*R) | u/(2*pi*R)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
    0.729225 | 0.785384 | 0.80638 | 0.975277 | 0.534332 | 0.689075 | 0.795786 | 0.928396 | 1.04142 | 0.941763 | 0.735464 | 0.68079
  tbl2: Table
    // Line Integration 1 (u/(2*pi*R))
    u/(2*pi*R)
    0.553336

Plots
  pg1: PlotGroup2D "2D Plot Group 1" | data = dset1
    surf1: Surface | expr = u
    line1: Line | data = none; expr = u
  pg2: PlotGroup1D "1D Plot Group 2" | data = cln1; xlabel = y; ylabel = \phi
    lngr1: LineGraph | data = cln1; expr = u
  pg3: PlotGroup3D "3D Plot Group 3"