// COMSOL Multiphysics 4.1 (Build: 88) model "alpha500_Robin_SourceSink.mph"
// Outline of the model tree

Parameters
  L = 240
  alpha = 500
  K0 = 1
  A = K0/(2*pi*R)
  R = L/alpha
  B = A/3

Geometry
  geom1 "Geometry 1" (2D, length unit m)
    sq1: Square | pos = {L/2, L/2}; base = center; size = L
    c1: Circle | pos = {(0.45*0.8+0.1)*L, (0.02*0.8+0.1)*L}; base = center; r = R
    c2: Circle | pos = {(0.24*0.8+0.1)*L, (0.17*0.8+0.1)*L}; base = center; r = R
    c3: Circle | pos = {(0.6*0.8+0.1)*L, (0.23*0.8+0.1)*L}; base = center; r = R
    c4: Circle | pos = {(0.23*0.8+0.1)*L, (0.27*0.8+0.1)*L}; base = center; r = R
    c5: Circle | pos = {(0.55*0.8+0.1)*L, (0.33*0.8+0.1)*L}; base = center; r = R
    c6: Circle | pos = {(1.02*0.8+0.1)*L, (0.41*0.8+0.1)*L}; base = center; r = R
    c7: Circle | pos = {(0.91*0.8+0.1)*L, (0.43*0.8+0.1)*L}; base = center; r = R
    c8: Circle | pos = {(0.27*0.8+0.1)*L, (0.6*0.8+0.1)*L}; base = center; r = R
    c9: Circle | pos = {(0.52*0.8+0.1)*L, (0.65*0.8+0.1)*L}; base = center; r = R
    c10: Circle | pos = {(0.59*0.8+0.1)*L, (0.66*0.8+0.1)*L}; base = center; r = R
    c11: Circle | pos = {(0.67*0.8+0.1)*L, (0.67*0.8+0.1)*L}; base = center; r = R
    c12: Circle | pos = {(0.13*0.8+0.1)*L, (0.75*0.8+0.1)*L}; base = center; r = R
    c13: Circle | pos = {(0.15*0.8+0.1)*L, (0.93*0.8+0.1)*L}; base = center; r = R
    c14: Circle | pos = {(0.2*0.8+0.1)*L, (0.87*0.8+0.1)*L}; base = center; r = R
    c15: Circle | pos = {(0.28*0.8+0.1)*L, (0.98*0.8+0.1)*L}; base = center; r = R
    c16: Circle | pos = {(0.8*0.8+0.1)*L, (0.85*0.8+0.1)*L}; base = center; r = R
    c17: Circle | pos = {(0.83*0.8+0.1)*L, (0.92*0.8+0.1)*L}; base = center; r = R
    dif1: Difference | input = sq1; input2 = c1, c10, c11, c12, c13, c14, c15, c16, c17, c2, c3, c4, c5, c6, c7, c8, c9
    fin: Finalize "Form Union"

Physics
  lpeq: LaplaceEquation "PDE"
    dependent variable u
    leq1: LaplaceEquation
    zflx1: ZeroFluxBoundary "Zero Flux 1"
    init1: init "Initial Values 1"
    dir1: DirichletBoundary "Dirichlet Boundary Condition 1" | r = 0
    flux1: FluxBoundary "Flux/Source 1" | g = A; q = A
    flux2: FluxBoundary "Flux/Source 2" | g = A; q = A
    flux3: FluxBoundary "Flux/Source 3" | g = 0; q = A
    flux4: FluxBoundary "Flux/Source 4" | g = A; q = A
    flux5: FluxBoundary "Flux/Source 5" | g = A; q = A
    flux6: FluxBoundary "Flux/Source 6" | g = A; q = A
    flux7: FluxBoundary "Flux/Source 7" | g = 0; q = A
    flux8: FluxBoundary "Flux/Source 8" | g = A; q = A
    flux9: FluxBoundary "Flux/Source 9" | g = 0; q = A
    flux10: FluxBoundary "Flux/Source 10" | g = A; q = A
    flux11: FluxBoundary "Flux/Source 11" | g = A; q = A
    flux12: FluxBoundary "Flux/Source 12" | g = A; q = A
    flux13: FluxBoundary "Flux/Source 13" | g = A; q = A
    flux14: FluxBoundary "Flux/Source 14" | g = 0; q = A
    flux15: FluxBoundary "Flux/Source 15" | g = A; q = A
    flux16: FluxBoundary "Flux/Source 16" | g = 0; q = A
    flux17: FluxBoundary "Flux/Source 17" | g = A; q = A

Mesh
  mesh1 "Mesh 1" (physics-controlled)
    size: MeshSizeDefault | hauto = 5

Studies
  std1 "Study 1"
    stat: Stationary

Solver configurations
  sol1 "Solver 1" (study std1)
    v1: Variables "Dependent Variables 1"
    s1: Stationary "Stationary Solver 1"
      dDef: Direct
      fc1: FullyCoupled

Datasets
  dset1: Solution | solution = sol1
  cln1: CutLine2D | data = dset1; genpoints = {{L/2+1.5, -L}, {L/2+1.5, 2*L}}

Derived values
  int1: IntLine "Line Integration 1" | data = dset1; table = tbl1; expr = lpeq.g_u
  int2: IntLine "Line Integration 2" | data = dset1; table = tbl1; expr = lpeq.g_u
  int3: IntLine "Line Integration 3" | data = dset1; table = tbl1; expr = lpeq.g_u
  int4: IntLine "Line Integration 4" | data = dset1; table = tbl1; expr = lpeq.g_u
  int5: IntLine "Line Integration 5" | data = dset1; table = tbl1; expr = lpeq.g_u
  int6: IntLine "Line Integration 6" | data = dset1; table = tbl1; expr = lpeq.g_u
  int7: IntLine "Line Integration 7" | data = dset1; table = tbl1; expr = lpeq.g_u
  int8: IntLine "Line Integration 8" | data = dset1; table = tbl1; expr = lpeq.g_u
  int9: IntLine "Line Integration 9" | data = dset1; table = tbl1; expr = lpeq.g_u
  int10: IntLine "Line Integration 10" | data = dset1; table = tbl1; expr = lpeq.g_u
  int11: IntLine "Line Integration 11" | data = dset1; table = tbl1; expr = lpeq.g_u
  int12: IntLine "Line Integration 12" | data = dset1; table = tbl1; expr = lpeq.g_u
  int13: IntLine "Line Integration 13" | data = dset1; table = tbl1; expr = lpeq.g_u
  int14: IntLine "Line Integration 14" | data = dset1; table = tbl1; expr = lpeq.g_u
  int15: IntLine "Line Integration 15" | data = dset1; table = tbl1; expr = lpeq.g_u
  int16: IntLine "Line Integration 16" | data = dset1; table = tbl1; expr = lpeq.g_u
  int17: IntLine "Line Integration 17" | data = dset1; table = tbl1; expr = lpeq.g_u

Tables
  tbl1: Table
    // Line Integration 1 (lpeq.g_u)
    Boundary flux/source | Boundary flux/source | Boundary flux/source | Boundary flux/source | Boundary flux/source | Boundary flux/source | Boundary flux/source | Boundary flux/source | Boundary flux/source | Boundary flux/source | Boundary flux/source | Boundary flux/source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
    0.503762 | 0.416654 | -0.179758 | 0.393546 | 0.41388 | 0.562099 | -0.12552 | 0.388448 | -0.255788 | 0.392463 | 0.3946 | 0.441257

Plots
  pg1: PlotGroup2D "2D Plot Group 1" | data = dset1
    surf1: Surface | expr = u
    line1: Line | data = none; expr = u
  pg2: PlotGroup1D "1D Plot Group 2" | data = cln1; xlabel = y; ylabel = \phi
    lngr1: LineGraph | data = cln1; expr = u

Exports
  plot1: Plot
    filename = /home/pdavid/Bureau/SS_malpighi/2D_cartesian/Validated_2D_Code/Smith_sources/alpha500_SourceSink/Contour_mesh2.txt
  plot2: Plot
    filename = /home/pdavid/Bureau/SS_malpighi/2D_cartesian/Validated_2D_Code/Smith_sources/alpha500_SourceSink/Contour_mesh1.txt
  plot3: Plot
    filename = /home/pdavid/Bureau/SS_malpighi/2D_cartesian/Validated_2D_Code/Smith_sources/alpha500_SourceSink/Contour_mesh1.txt
  plot4: Plot
    filename = /home/pdavid/Bureau/SS_malpighi/2D_cartesian/Validated_2D_Code/Smith_sources/alpha500_SourceSink/Contour_mesh2.txt
  plot5: Plot
    filename = /home/pdavid/Bureau/SS_malpighi/2D_cartesian/Validated_2D_Code/Smith_sources/alpha500_SourceSink/Contour_mesh3.txt
  plot6: Plot
    filename = /home/pdavid/Bureau/SS_malpighi/2D_cartesian/Validated_2D_Code/Smith_sources/alpha500_SourceSink/Contour_mesh3.txt
  plot7: Plot
    filename = /home/pdavid/Bureau/SS_malpighi/2D_cartesian/Validated_2D_Code/Smith_sources/alpha500_SourceSink/Contour_mesh4.txt