// COMSOL Multiphysics 4.1 (Build: 88) model "a_testing_COMSOL.mph"
// Outline of the model tree

Geometry
  geom1 "Geometry 1" (2D, length unit m)
    sq1: Square | pos = {0, 0}; base = center; size = 10
    c1: Circle | pos = {0.9, 0.9}; base = center; r = 0.2
    mov1: Move | input = sq1
    c2: Circle | pos = {0.6, .6}; base = center; r = 0.2
    dif1: Difference | input = mov1; input2 = c1, c2
    fin: Finalize "Form Union"

Physics
  lpeq: LaplaceEquation "PDE"
    dependent variable u
    leq1: LaplaceEquation
    zflx1: ZeroFluxBoundary "Zero Flux 1"
    init1: init "Initial Values 1"
    dir1: DirichletBoundary "Dirichlet Boundary Condition 1" | r = 0
    flux1: FluxBoundary "Flux/Source 1" | g = 1; q = 1
    flux2: FluxBoundary "Flux/Source 2" | g = 0; q = 1

Mesh
  mesh1 "Mesh 1" (physics-controlled)
    size: MeshSizeDefault | hauto = 1

Studies
  std1 "Study 1"
    stat: Stationary

Solver configurations
  sol1 "Solver 1" (study std1)
    v1: Variables "Dependent Variables 1"
    s1: Stationary "Stationary Solver 1"
      dDef: Direct
      fc1: FullyCoupled

Datasets
  dset1: Solution | solution = sol1
  cln1: CutLine2D | data = dset1; genpoints = {{5, 0}, {-5, 0}}

Derived values
  int1: IntLine "Line Integration 1" | data = dset1; table = tbl1; expr = lpeq.g_u
  int2: IntLine "Line Integration 2" | data = dset1; table = tbl2; expr = lpeq.g_u
  int3: IntLine "Line Integration 3" | data = dset1; table = new; expr = lpeq.g_u

Tables
  tbl1: Table
    // Line Integration 1 (lpeq.g_u)
    Boundary flux/source | Boundary flux/source | Boundary flux/source | Boundary flux/source | Boundary flux/source | Boundary flux/source
    -0.0398937 | -0.0619975 | -0.0951201 | -0.0619975 | -0.182079 | -0.247425
  tbl2: Table
    // Line Integration 2 (lpeq.g_u)
    Boundary flux/source | Boundary flux/source | Boundary flux/source | Boundary flux/source | Boundary flux/source | Boundary flux/source
    0.765846 | 0.768695 | 0.775157 | 0.768695 | 0.801752 | 0.822083

Plots
  pg1: PlotGroup2D "2D Plot Group 1" | data = dset1
    surf1: Surface | data = dset1; expr = u
  pg2: PlotGroup1D "1D Plot Group 2" | data = dset1
    lngr1: LineGraph | data = cln1; expr = u

Exports
  data1: Data | data = cln1; filename = /home/pdavid/Bureau/COMSOL_tests/L100_R1_a6_phi.txt