// COMSOL Multiphysics 4.1 (Build: 88) model "COMSOL_multiple.mph"
// Outline of the model tree

Parameters
  L = 240
  x_0 = 0.45-0.06
  y_0 = 0.02-0.03
  x_1 = 0.24-0.06
  y_1 = 0.17-0.03
  x_2 = 0.6-0.06
  y_2 = 0.23-0.03
  x_3 = 0.23-0.06
  y_3 = 0.27-0.03
  x_4 = 0.55-0.06
  y_4 = 0.33-0.03
  x_5 = 1.02-0.06
  y_5 = .41-0.03
  x_6 = 0.96-0.06  // .
  y_6 = 0.43-0.03
  x_7 = 0.27-0.06
  y_7 = 0.6-0.03
  x_8 = 0.53-0.06
  y_8 = 0.65-0.03
  x_9 = 0.59-0.06
  y_9 = 0.62-0.03
  x_10 = 0.67-0.06
  y_10 = 0.69-0.03
  x_11 = 0.13-0.06
  y_11 = 0.75-0.03
  x_12 = 0.15-0.06
  y_12 = 0.93-0.03
  x_13 = 0.2-0.06
  y_13 = 0.87-0.03
  x_14 = 0.28-0.06
  y_14 = 0.98-0.03
  x_15 = 0.8-0.06
  y_15 = 0.85-0.03
  x_16 = 0.83-0.06
  y_16 = 0.92-0.03
  alpha = 50
  R = L/alpha

Selections
  poeq_dst_pc1 "Selection 1"

Geometry
  geom1 "Geometry 1" (2D, length unit µm)
    c1: Circle | pos = {(x_0*0.8+0.1)*L, (y_0*0.8+0.1)*L}; base = center; r = R
    c2: Circle | pos = {(x_1*0.8+0.1)*L, (y_1*0.8+0.1)*L}; base = center; r = R
    c3: Circle | pos = {(x_2*0.8+0.1)*L, (y_2*0.8+0.1)*L}; base = center; r = R
    c4: Circle | pos = {(x_3*0.8+0.1)*L, (y_3*0.8+0.1)*L}; base = center; r = R
    c5: Circle | pos = {(x_4*0.8+0.1)*L, (y_4*0.8+0.1)*L}; base = center; r = R
    c6: Circle | pos = {(x_5*0.8+0.1)*L, (y_5*0.8+0.1)*L}; base = center; r = R
    c7: Circle | pos = {(x_6*0.8+0.1)*L, (y_6*0.8+0.1)*L}; base = center; r = R
    c8: Circle | pos = {(x_7*0.8+0.1)*L, (y_7*0.8+0.1)*L}; base = center; r = R
    c9: Circle | pos = {(x_8*0.8+0.1)*L, (y_8*0.8+0.1)*L}; base = center; r = R
    c10: Circle | pos = {(x_9*0.8+0.1)*L, (y_9*0.8+0.1)*L}; base = center; r = R
    c11: Circle | pos = {(x_10*0.8+0.1)*L, (y_10*0.8+0.1)*L}; base = center; r = R
    c12: Circle | pos = {(x_11*0.8+0.1)*L, (y_11*0.8+0.1)*L}; base = center; r = R
    c13: Circle | pos = {(x_12*0.8+0.1)*L, (y_12*0.8+0.1)*L}; base = center; r = R
    c14: Circle | pos = {(x_13*0.8+0.1)*L, (y_13*0.8+0.1)*L}; base = center; r = R
    c15: Circle | pos = {(x_14*0.8+0.1)*L, (y_14*0.8+0.1)*L}; base = center; r = R
    c16: Circle | pos = {(x_15*0.8+0.1)*L, (y_15*0.8+0.1)*L}; base = center; r = R
    c17: Circle | pos = {(x_16*0.8+0.1)*L, (y_16*0.8+0.1)*L}; base = center; r = R
    sq1: Square | pos = {0, 0}; base = corner; size = L
    dif1: Difference | input = sq1; input2 = c1, c10, c11, c12, c13, c14, c15, c16, c17, c2, c3, c4, c5, c6, c7, c8, c9
    mov1: Move | input = sq1; displx = 0; disply = 0
      prob1: GeomError "Error 1"
        error: GeomError | details = Property: input
    fin: Finalize "Form Union"

Physics
  poeq: PoissonEquation "PDE"
    dependent variable u
    peq1: PoissonEquation "Poisson's Equation 1" | f = CMRO2_max*u/(u+phi_0)
    zflx1: ZeroFluxBoundary "Zero Flux 1"
    init1: init "Initial Values 1"
    pc1: PeriodicCondition
    dir1: DirichletBoundary "Dirichlet Boundary Condition 1" | r = 0

Mesh
  mesh1 "Mesh 1" (physics-controlled)

Studies
  std1 "Study 1"
    stat: Stationary